<FDM_CONFIG NAME="McDonnell F-4 Phantom II" VERSION="1.65" RELEASE="ALPHA">
<!--
  File:     F4E.xml
  Author:   Aero-Matic v 0.71

  Inputs:
    name:          McDonnell F-4 Phantom II
    type:          two-engine transonic/supersonic fighter
    max weight:    61795 lb
    wing span:      38.62 ft
    length:        63 ft
    wing area:     530 sq-ft
    gear type:     tricycle
    retractable?:  yes
    # engines:     2
    engine type:   turbine
    engine layout: aft fuselage
    yaw damper?    yes
  Outputs:
    wing loading:  116.59 lb/sq-ft
    CL-alpha:      3.6 per radian
    CL-0:          0.08
    CL-max:        1
    CD-0:          0.024
    K:             0.09

    rkj: engines pitched to 6º
    rkj: main gears spread 135.8 inches, nose gear moved aft 99 inches
    rkj: adjusted fuel tank quantities, still need to accurately locate
    rkj: lightened AC_EMPTYWT from 37077 to 29535
    rkj: EYEPTLOC  151.2 0.0 38.0 -> 453.6 0.0 0.0
-->

 <METRICS>
   AC_WINGAREA  530.00
   AC_WINGSPAN  38.62
   AC_CHORD     16.04
   AC_HTAILAREA 106.00
   AC_HTAILARM  25.20
   AC_VTAILAREA 95.40
   AC_LV        25.20
   AC_IXX       23668
   AC_IYY       117500
   AC_IZZ       133726
   AC_IXY       1573
   AC_EMPTYWT   29535
   AC_CGLOC     453.6 0.0 -18.9
   AC_AERORP    453.6 0.0 0.0
   AC_EYEPTLOC  453.6 0.0 0.0
   AC_VRP       0 0 0
 </METRICS>
 <UNDERCARRIAGE>
  AC_GEAR NOSE_LG   189.3 0.0 -90.7 18538.5 6179.5 0.5 0.8 0.02 STEERABLE NONE 45.0 RETRACT
  AC_GEAR LEFT_MLG  471.7 -109.6 -90.7 61795.0 12359.0 0.5 0.8 0.02 FIXED LEFT  0 RETRACT
  AC_GEAR RIGHT_MLG 471.7 109.6 -90.7 61795.0 12359.0 0.5 0.8 0.02 FIXED RIGHT 0 RETRACT
 </UNDERCARRIAGE>
 <PROPULSION>
  <AC_ENGINE FILE="J79-GE-17">
    XLOC 696
    YLOC -20
    ZLOC 0
    PITCH 6
    YAW 0
    FEED 0
    <AC_THRUSTER FILE="direct">
      XLOC 696
      YLOC -20
      ZLOC 0
      PITCH 0
      YAW 0
    </AC_THRUSTER>
  </AC_ENGINE>
  <AC_ENGINE FILE="J79-GE-17-1">
    XLOC 696
    YLOC 20
    ZLOC 0
    PITCH 6
    YAW 0
    FEED 0
    <AC_THRUSTER FILE="direct">
      XLOC 696
      YLOC 20
      ZLOC 0
      PITCH 0
      YAW 0
    </AC_THRUSTER>
  </AC_ENGINE>
<!-- Internal Fuel 1855 gallons*6.6 -->
  <AC_TANK TYPE="FUEL" NUMBER="0">
    XLOC 453.6
    YLOC 0
    ZLOC 25
    RADIUS 1
    CAPACITY 12243.0
    CONTENTS 12243.0
  </AC_TANK>
<!-- Centerline Tank 600 gallon*6.6 -->
  <AC_TANK TYPE="FUEL" NUMBER="1">
    XLOC 453.6
    YLOC 0
    ZLOC  -25.0
    RADIUS 1
    CAPACITY 3960.0
    CONTENTS 3960.0
  </AC_TANK>
<!-- Wing tanks 370 gallons*6.6 -->
  <AC_TANK TYPE="FUEL" NUMBER="2">
    XLOC 453.6
    YLOC 141.7
    ZLOC -25.0
    RADIUS 1
    CAPACITY 2442.0
    CONTENTS   0.0
  </AC_TANK>
  <AC_TANK TYPE="FUEL" NUMBER="3">
    XLOC 453.6
    YLOC -141.7
    ZLOC -25.0
    RADIUS 1
    CAPACITY 2442.0
    CONTENTS   0.0
  </AC_TANK>
 </PROPULSION>
 <FLIGHT_CONTROL NAME="McDonnell F-4 Phantom II">
   <COMPONENT NAME="Pitch Trim Sum" TYPE="SUMMER">
      INPUT   fcs/elevator-cmd-norm
      INPUT   fcs/pitch-trim-cmd-norm
      CLIPTO  -1 1
   </COMPONENT>
   <COMPONENT NAME="Elevator Control" TYPE="AEROSURFACE_SCALE">
      INPUT   fcs/pitch-trim-sum
      MIN     -0.350
      MAX      0.300
      OUTPUT  fcs/elevator-pos-rad
   </COMPONENT>
   <COMPONENT NAME="Roll Trim Sum" TYPE="SUMMER">
      INPUT   fcs/aileron-cmd-norm
      INPUT   fcs/roll-trim-cmd-norm
      CLIPTO  -1 1
   </COMPONENT>
   <COMPONENT NAME="Left Aileron Control" TYPE="AEROSURFACE_SCALE">
      INPUT   fcs/roll-trim-sum
      MIN    -0.35
      MAX     0.35
      OUTPUT  fcs/left-aileron-pos-rad
   </COMPONENT>
   <COMPONENT NAME="Right Aileron Control" TYPE="AEROSURFACE_SCALE">
      INPUT  -fcs/roll-trim-sum
      MIN    -0.35
      MAX     0.35
      OUTPUT  fcs/right-aileron-pos-rad
   </COMPONENT>
   <COMPONENT NAME="Rudder Command Sum" TYPE="SUMMER">
      INPUT   fcs/rudder-cmd-norm
      INPUT   fcs/yaw-trim-cmd-norm
      CLIPTO  -1 1
   </COMPONENT>
   <COMPONENT NAME="Yaw Damper Rate" TYPE="SCHEDULED_GAIN">
      INPUT        velocities/r-aero-rad_sec
      SCHEDULED_BY aero/qbar-psf
      ROWS         2
       3.00        0.00
      11.00        2.00
   </COMPONENT>
   <COMPONENT NAME="Yaw Damper Beta" TYPE="SCHEDULED_GAIN">
      INPUT        aero/beta-rad
      SCHEDULED_BY aero/qbar-psf
      ROWS         2
       3.00        0.00
      11.00        0.00
   </COMPONENT>
   <COMPONENT NAME="Yaw Damper Sum" TYPE="SUMMER">
      INPUT        fcs/yaw-damper-beta
      INPUT        fcs/yaw-damper-rate
      CLIPTO      -0.2 0.2
   </COMPONENT>
   <COMPONENT NAME="Yaw Damper Final" TYPE="SCHEDULED_GAIN">
      INPUT        fcs/yaw-damper-sum
      SCHEDULED_BY aero/qbar-psf
      ROWS         2
      2.99         0.0
      3.00         1.0
   </COMPONENT>
   <COMPONENT NAME="Rudder Sum" TYPE="SUMMER">
      INPUT   fcs/rudder-command-sum
      INPUT   fcs/yaw-damper-final
      CLIPTO  -1 1
   </COMPONENT>
   <COMPONENT NAME="Rudder Control" TYPE="AEROSURFACE_SCALE">
      INPUT   fcs/rudder-sum
      MIN     -0.35
      MAX      0.35
      OUTPUT  fcs/rudder-pos-rad
   </COMPONENT>
   <COMPONENT NAME="Flaps Control" TYPE="KINEMAT">
     INPUT   fcs/flap-cmd-norm
     DETENTS 3
             0   0
             15  4
             30  3
     OUTPUT  fcs/flap-pos-deg
   </COMPONENT>
   <COMPONENT NAME="Gear Control" TYPE="KINEMAT">
     INPUT   gear/gear-cmd-norm
     DETENTS 2
             0   0
             1   5
     OUTPUT  gear/gear-pos-norm
   </COMPONENT>
   <COMPONENT NAME="Speedbrake Control" TYPE="KINEMAT">
     INPUT   fcs/speedbrake-cmd-norm
     DETENTS 2
             0   0
             1   1
     OUTPUT  fcs/speedbrake-pos-norm
   </COMPONENT>
 </FLIGHT_CONTROL>
 <AERODYNAMICS>
  <AXIS NAME="LIFT">
    <COEFFICIENT NAME="CLalpha" TYPE="VECTOR">
      Lift_due_to_alpha
      9
      aero/alpha-rad
      aero/qbar-psf|metrics/Sw-sqft
      -0.20 -0.640
       0.00 0.080
       0.157 0.560
       0.244 0.810
       0.332 0.990
       0.419 1.050
       0.506 1.070
       0.593 1.085
       0.681 1.090
    </COEFFICIENT>
<!--
      -0.20 -0.640
       0.00 0.080
       0.26 1.000
       0.60 0.448
-->
    <COEFFICIENT NAME="dCLflap" TYPE="VALUE">
       Delta_Lift_due_to_flaps
       aero/qbar-psf|metrics/Sw-sqft|fcs/components/flaps-control/output-norm
       0.35
    </COEFFICIENT>
    <COEFFICIENT NAME="dCLsb" TYPE="VALUE">
       Delta_Lift_due_to_speedbrake
       aero/qbar-psf|metrics/Sw-sqft|fcs/speedbrake-pos-norm
       0
    </COEFFICIENT>
    <COEFFICIENT NAME="CLde" TYPE="VALUE">
       Lift_due_to_Elevator_Deflection
       aero/qbar-psf|metrics/Sw-sqft|fcs/elevator-pos-rad
       0.2
    </COEFFICIENT>
  </AXIS>
  <AXIS NAME="DRAG">
    <COEFFICIENT NAME="CD0" TYPE="VECTOR">
       Drag_at_zero_lift
       5
       aero/alpha-rad
       aero/qbar-psf|metrics/Sw-sqft
       -1.57       1.500
       -0.26    0.048
        0.00    0.024
        0.26    0.048
        1.57       1.500
    </COEFFICIENT>
    <COEFFICIENT NAME="CDi" TYPE="VALUE">
       Induced_drag
       aero/qbar-psf|metrics/Sw-sqft|aero/cl-squared-norm
       0.09
    </COEFFICIENT>
    <COEFFICIENT NAME="CDmach" TYPE="VECTOR">
       Drag_due_to_mach
       4
       velocities/mach-norm
       aero/qbar-psf|metrics/Sw-sqft
       0.0       0.000
       0.81      0.000
       1.1       0.023
       1.8       0.015
    </COEFFICIENT>
    <COEFFICIENT NAME="CDflap" TYPE="VALUE">
       Drag_due_to_flaps
       aero/qbar-psf|metrics/Sw-sqft|fcs/components/flaps-control/output-norm
       0.075
    </COEFFICIENT>
    <COEFFICIENT NAME="CDgear" TYPE="VALUE">
       Drag_due_to_gear
       aero/qbar-psf|metrics/Sw-sqft|gear/gear-pos-norm
       0.02
    </COEFFICIENT>
    <COEFFICIENT NAME="CDsb" TYPE="VALUE">
       Drag_due_to_speedbrakes
       aero/qbar-psf|metrics/Sw-sqft|fcs/speedbrake-pos-norm
       0.034
    </COEFFICIENT>

    <COEFFICIENT NAME="CDbc" TYPE="VALUE">
       Drag_due_to_braking_chute
       aero/qbar-psf|metrics/Sw-sqft|/sim/model/controls/flight/chute_open
       1.035
    </COEFFICIENT>

    <COEFFICIENT NAME="CDbeta" TYPE="VECTOR">
       Drag_due_to_sideslip
       5
       aero/beta-rad
       aero/qbar-psf|metrics/Sw-sqft
       -1.57       1.230
       -0.26    0.050
        0.00       0.00
        0.26    0.050
        1.57       1.230
    </COEFFICIENT>
    <COEFFICIENT NAME="CDde" TYPE="VALUE">
       Drag_due_to_Elevator_Deflection
       aero/qbar-psf|metrics/Sw-sqft|fcs/elevator-pos-norm
       0.075
    </COEFFICIENT>
  </AXIS>
  <AXIS NAME="SIDE">
    <COEFFICIENT NAME="CYb" TYPE="VALUE">
       Side_force_due_to_beta
       aero/qbar-psf|metrics/Sw-sqft|aero/beta-rad
       -1
    </COEFFICIENT>
  </AXIS>
  <AXIS NAME="ROLL">
    <COEFFICIENT NAME="Clb" TYPE="VALUE">
       Roll_moment_due_to_beta
       aero/qbar-psf|metrics/Sw-sqft|metrics/bw-ft|aero/beta-rad
       -0.1
    </COEFFICIENT>
    <COEFFICIENT NAME="Clp" TYPE="VALUE">
       Roll_moment_due_to_roll_rate
       aero/qbar-psf|metrics/Sw-sqft|metrics/bw-ft|aero/bi2vel|velocities/p-aero-rad_sec
       -0.4
    </COEFFICIENT>
    <COEFFICIENT NAME="Clr" TYPE="VALUE">
       Roll_moment_due_to_yaw_rate
       aero/qbar-psf|metrics/Sw-sqft|metrics/bw-ft|aero/bi2vel|velocities/r-aero-rad_sec
       0.15
    </COEFFICIENT>
    <COEFFICIENT NAME="Clda" TYPE="VECTOR">
       Roll_moment_due_to_aileron
       2
       velocities/mach-norm
       aero/qbar-psf|metrics/Sw-sqft|metrics/bw-ft|fcs/left-aileron-pos-rad
       0.0       0.12
       2.0    0.040
    </COEFFICIENT>
    <COEFFICIENT NAME="Cldr" TYPE="VALUE">
       Roll_moment_due_to_rudder
       aero/qbar-psf|metrics/Sw-sqft|metrics/bw-ft|fcs/rudder-pos-rad
       0.01
    </COEFFICIENT>
  </AXIS>
  <AXIS NAME="PITCH">
    <COEFFICIENT NAME="Cmalpha" TYPE="VALUE">
       Pitch_moment_due_to_alpha
       aero/qbar-psf|metrics/Sw-sqft|metrics/cbarw-ft|aero/alpha-rad
       -0.3
    </COEFFICIENT>
    <COEFFICIENT NAME="Cmde" TYPE="VECTOR">
       Pitch_moment_due_to_elevator
       2
       velocities/mach-norm
       aero/qbar-psf|metrics/Sw-sqft|metrics/cbarw-ft|fcs/elevator-pos-rad
       0.0       -0.8
       2.0     -0.200
    </COEFFICIENT>
    <COEFFICIENT NAME="Cmq" TYPE="VALUE">
       Pitch_moment_due_to_pitch_rate
       aero/qbar-psf|metrics/Sw-sqft|metrics/cbarw-ft|aero/ci2vel|velocities/q-aero-rad_sec
       -18
    </COEFFICIENT>
    <COEFFICIENT NAME="Cmadot" TYPE="VALUE">
       Pitch_moment_due_to_alpha_rate
       aero/qbar-psf|metrics/Sw-sqft|metrics/cbarw-ft|aero/ci2vel|aero/alphadot-rad_sec
       -9
    </COEFFICIENT>
  </AXIS>
  <AXIS NAME="YAW">
    <COEFFICIENT NAME="Cnb" TYPE="VALUE">
       Yaw_moment_due_to_beta
       aero/qbar-psf|metrics/Sw-sqft|metrics/bw-ft|aero/beta-rad
       0.12
    </COEFFICIENT>
    <COEFFICIENT NAME="Cnr" TYPE="VALUE">
       Yaw_moment_due_to_yaw_rate
       aero/qbar-psf|metrics/Sw-sqft|metrics/bw-ft|aero/bi2vel|velocities/r-aero-rad_sec
       -0.15
    </COEFFICIENT>
    <COEFFICIENT NAME="Cndr" TYPE="VALUE">
       Yaw_moment_due_to_rudder
       aero/qbar-psf|metrics/Sw-sqft|metrics/bw-ft|fcs/rudder-pos-rad
       -0.1
    </COEFFICIENT>
    <COEFFICIENT NAME="Cnda" TYPE="VALUE">
       Adverse_yaw
       aero/qbar-psf|metrics/Sw-sqft|metrics/bw-ft|fcs/left-aileron-pos-rad
       0
    </COEFFICIENT>
  </AXIS>
 </AERODYNAMICS>
</FDM_CONFIG>
